<?xml version="1.0" encoding="UTF-8"?>
<neuroml xmlns="http://www.neuroml.org/schema/neuroml2" xmlns:xsi="http://www.w3.org/2001/XMLSchema-instance" xsi:schemaLocation="http://www.neuroml.org/schema/neuroml2  https://raw.githubusercontent.com/NeuroML/NeuroML2/development/Schemas/NeuroML2/NeuroML_v2beta5.xsd" id="GC_soma">

    <include href="../kamt.channel.nml"/>
    <include href="../kdrmt.channel.nml"/>
    <include href="../nax.channel.nml"/>
    <include href="../nax__sh15.channel.nml"/>
    <include href="../pas.channel.nml"/>

    <cell id="GC_soma">

        <notes>Cell: Granule_0 exported from NEURON ModelView</notes>

        <morphology id="morphology_GC_soma">

            <segment id="0" name="Seg0_soma">
                <proximal x="0.0" y="0.0" z="0.0" diameter="8.0"/>
                <distal x="0.0" y="8.0" z="0.0" diameter="8.0"/>
            </segment>

            <segmentGroup id="soma" neuroLexId="sao864921383">    <!--
                This group contains an unbranched set of segments, and all of the segmentGroups marked with
                neuroLexId = sao864921383 form a non-overlapping set of all of the segments.
                These segmentGroups correspond to the 'cables' of NeuroML v1.8.1. -->

                <member segment="0"/>
            </segmentGroup>

            <segmentGroup id="all">
                <include segmentGroup="soma"/>
            </segmentGroup>

            <segmentGroup id="soma_group" neuroLexId="GO:0043025">    <!--Soma group-->

                <include segmentGroup="soma"/>
            </segmentGroup>

        </morphology>

            <!--Adding the biophysical parameters-->

        <biophysicalProperties id="biophys">

            <membraneProperties>

                <channelDensity condDensity="4.0 mS_per_cm2" id="kamt_OneSecGrp_SectionRef_1" ionChannel="kamt" segmentGroup="soma_group" ion="k" erev="-90.0 mV"/>

                <channelDensity condDensity="6.0 mS_per_cm2" id="kdrmt_OneSecGrp_SectionRef_1" ionChannel="kdrmt" segmentGroup="soma_group" ion="k" erev="-90.0 mV"/>

                <channelDensity condDensity="40.0 mS_per_cm2" id="nax_OneSecGrp_SectionRef_1" ionChannel="nax" segmentGroup="soma_group" ion="na" erev="50.0 mV"/>

                <channelDensity condDensity="0.133333 mS_per_cm2" id="pas_ModelViewParmSubset_3" ionChannel="pas" segmentGroup="soma_group" ion="non_specific" erev="-61.7723 mV"/>

                <spikeThresh value="0.0 mV"/>

                <specificCapacitance segmentGroup="all" value="4.0 uF_per_cm2"/>

                <initMembPotential value="-65.0 mV"/>

            </membraneProperties>

            <intracellularProperties>

                <resistivity value="0.08 kohm_cm"/>

            </intracellularProperties>

        </biophysicalProperties>

    </cell>

</neuroml>
