<neuroml xmlns="http://www.neuroml.org/schema/neuroml2"  xmlns:xs="http://www.w3.org/2001/XMLSchema" xmlns:xsi="http://www.w3.org/2001/XMLSchema-instance" xsi:schemaLocation="http://www.neuroml.org/schema/neuroml2 https://raw.github.com/NeuroML/NeuroML2/development/Schemas/NeuroML2/NeuroML_v2beta4.xsd" id="NeuroML2_file_exported_from_NEURON">

    <include href="../Channels/pas.channel.nml"/>
    <include href="../Channels/nax__sh15.channel.nml"/>
    <include href="../Channels/kamt.channel.nml"/>
    <include href="../Channels/kdrmt.channel.nml"/>

    <cell id="Granule_0_27118">
        <notes>Cell: Granule_0_4813 exported from NEURON ModelView</notes>
        <morphology id="morphology">
            <segment id="0" name="Seg0_soma">
                <proximal y="0.000000e+00" x="0.000000e+00" z="0.000000e+00" diameter="8.000000e+00"/>
                <distal y="-4.943004e+00" x="-5.233769e+00" z="-3.489179e+00" diameter="8.000000e+00"/>
            </segment>
            <segment id="14441" name="Seg0_priden">
                <parent fractionAlong="1" segment="0"/>
                <proximal y="0.000000e+00" x="0.000000e+00" z="0.000000e+00" diameter="5.000000e-01"/>
                <distal y="-9.450035e+01" x="-1.000592e+02" z="-6.670613e+01" diameter="5.000000e-01"/>
            </segment>
            <segment id="14442" name="Seg0_priden2_0">
                <parent fractionAlong="1" segment="0"/>
                <proximal y="0.000000e+00" x="0.000000e+00" z="0.000000e+00" diameter="4.000000e-01"/>
                <distal y="-1.544689e+02" x="-1.635553e+02" z="-1.090369e+02" diameter="4.000000e-01"/>
            </segment>
            <segmentGroup neuroLexId="sao864921383" id="soma">
                <notes>This group contains an unbranched set of segments, and all of the segmentGroups marked with
             neuroLexId = sao864921383 form a non-overlapping set of all of the segments.
             These segmentGroups correspond to the 'cables' of NeuroML v1.8.1, and map to/from NEURON sections.</notes>
                <member segment="0"/>
            </segmentGroup>
            <segmentGroup neuroLexId="sao864921383" id="priden">
                <notes>This group contains an unbranched set of segments, and all of the segmentGroups marked with
             neuroLexId = sao864921383 form a non-overlapping set of all of the segments.
             These segmentGroups correspond to the 'cables' of NeuroML v1.8.1, and map to/from NEURON sections.</notes>
                <property tag="numberInternalDivisions" value="11"/>
                <member segment="14441"/>
            </segmentGroup>
            <segmentGroup neuroLexId="sao864921383" id="priden2_0">
                <notes>This group contains an unbranched set of segments, and all of the segmentGroups marked with
             neuroLexId = sao864921383 form a non-overlapping set of all of the segments.
             These segmentGroups correspond to the 'cables' of NeuroML v1.8.1, and map to/from NEURON sections.</notes>
                <property tag="numberInternalDivisions" value="26"/>
                <member segment="14442"/>
            </segmentGroup>
            <segmentGroup id="OneSecGrp_SectionRef_28880">
                <include segmentGroup="priden"/>
            </segmentGroup>
            <segmentGroup id="OneSecGrp_SectionRef_28881">
                <include segmentGroup="priden2_0"/>
            </segmentGroup>
            <segmentGroup id="OneSecGrp_SectionRef_28879">
                <include segmentGroup="soma"/>
            </segmentGroup>
            <segmentGroup id="all">
                <include segmentGroup="soma"/>
                <include segmentGroup="priden"/>
                <include segmentGroup="priden2_0"/>
            </segmentGroup>
            <segmentGroup neuroLexId="GO:0043025" id="soma_group">
                <include segmentGroup="soma"/>
            </segmentGroup>
            <segmentGroup neuroLexId="GO:0030425" id="dendrite_group">
                <include segmentGroup="priden"/>
                <include segmentGroup="priden2_0"/>
            </segmentGroup>
            <segmentGroup neuroLexId="GO:0030424" id="axon_group"/>
        </morphology>

        <biophysicalProperties id="biophys">

            <membraneProperties>

                <channelDensity segmentGroup="dendrite_group" ionChannel="pas"       condDensity="0.00013333333333 S_per_cm2" erev="-65.0 mV" id="passive_dendritic" ion="non_specific"/>
                <channelDensity segmentGroup="dendrite_group" ionChannel="nax__sh15" condDensity="0.02 S_per_cm2"    erev="60.0 mV" id="nax_dendritic" ion="na" />
                <channelDensity segmentGroup="dendrite_group" ionChannel="kamt"      condDensity="0.008 S_per_cm2"  erev="-90.0 mV" id="kamt_dendritic" ion="k" />

                <channelDensity segmentGroup="soma_group" ionChannel="pas"      condDensity="0.00013333333333 S_per_cm2" erev="-65.0 mV" id="passive_somatic" ion="non_specific"/>
                <channelDensity segmentGroup="soma_group" ionChannel="nax__sh15" condDensity="0.04 S_per_cm2"    erev="60.0 mV" id="nax_somatic" ion="na" />
                <channelDensity segmentGroup="soma_group" ionChannel="kdrmt"    condDensity="0.006 S_per_cm2"  erev="-90.0 mV" id="kdrmt_somatic" ion="k" />
                <channelDensity segmentGroup="soma_group" ionChannel="kamt"     condDensity="0.004 S_per_cm2"  erev="-90.0 mV" id="kamt_somatic" ion="k" />

                <spikeThresh value="0 mV"/>

                <specificCapacitance value="4.0 uF_per_cm2"/>

                <initMembPotential value="-65.0 mV"/>

            </membraneProperties>

            <intracellularProperties>
                <resistivity value="80 ohm_cm"/>
            </intracellularProperties>

        </biophysicalProperties>
    </cell>
</neuroml>
