<neuroml xmlns="http://www.neuroml.org/schema/neuroml2"  xmlns:xs="http://www.w3.org/2001/XMLSchema" xmlns:xsi="http://www.w3.org/2001/XMLSchema-instance" xsi:schemaLocation="http://www.neuroml.org/schema/neuroml2 https://raw.github.com/NeuroML/NeuroML2/development/Schemas/NeuroML2/NeuroML_v2beta4.xsd" id="NeuroML2_file_exported_from_NEURON">

    <include href="../../Channels/pas.channel.nml"/>
    <include href="../../Channels/nax__sh0.channel.nml"/>
    <include href="../../Channels/nax__sh10.channel.nml"/>
    <include href="../../Channels/kamt.channel.nml"/>
    <include href="../../Channels/kdrmt.channel.nml"/>

    <cell id="Mitral_0_300">
        <notes>Cell: Mitral_0_300 exported from NEURON ModelView</notes>
        <morphology id="morphology">
            <segment id="0" name="Seg0_soma">
                <proximal y="0.000000e+00" x="0.000000e+00" z="0.000000e+00" diameter="3.725050e+00"/>
                <distal y="-5.000000e-02" x="8.020000e-01" z="-1.955000e+00" diameter="6.647710e+00"/>
            </segment>
            <segment id="184681" name="Seg1_soma">
                <parent fractionAlong="1" segment="0"/>
                <distal y="-1.100000e-01" x="1.605000e+00" z="-3.909000e+00" diameter="1.249200e+01"/>
            </segment>
            <segment id="184682" name="Seg2_soma">
                <parent fractionAlong="1" segment="184681"/>
                <distal y="-1.600000e-01" x="2.408000e+00" z="-5.864000e+00" diameter="1.723410e+01"/>
            </segment>
            <segment id="184683" name="Seg3_soma">
                <parent fractionAlong="1" segment="184682"/>
                <distal y="-2.100000e-01" x="3.211000e+00" z="-7.818000e+00" diameter="2.038930e+01"/>
            </segment>
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            <segmentGroup neuroLexId="sao864921383" id="soma">
                <notes>This group contains an unbranched set of segments, and all of the segmentGroups marked with
             neuroLexId = sao864921383 form a non-overlapping set of all of the segments.
             These segmentGroups correspond to the 'cables' of NeuroML v1.8.1, and map to/from NEURON sections.</notes>
                <member segment="0"/>
                <member segment="184681"/>
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            </segmentGroup>
            <segmentGroup neuroLexId="sao864921383" id="hillock">
                <notes>This group contains an unbranched set of segments, and all of the segmentGroups marked with
             neuroLexId = sao864921383 form a non-overlapping set of all of the segments.
             These segmentGroups correspond to the 'cables' of NeuroML v1.8.1, and map to/from NEURON sections.</notes>
                <property tag="numberInternalDivisions" value="3"/>
                <member segment="185819"/>
            </segmentGroup>
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            <segmentGroup neuroLexId="GO:0043025" id="soma_group">
                <include segmentGroup="soma"/>
            </segmentGroup>
            <segmentGroup neuroLexId="GO:0030425" id="dendrite_group">
                <include segmentGroup="secden_5"/>
                <include segmentGroup="secden_4"/>
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            </segmentGroup>
            <segmentGroup neuroLexId="GO:0030424" id="axon_group">
                <include segmentGroup="hillock"/>
                <include segmentGroup="initialseg"/>
            </segmentGroup>
        </morphology>

        <biophysicalProperties id="biophys">

            <membraneProperties>

                <channelDensity segmentGroup="dendrite_group" ionChannel="pas"       condDensity="0.0001 S_per_cm2" erev="-65.0 mV" id="passive_dendritic" ion="non_specific"/>
                <channelDensity segmentGroup="dendrite_group" ionChannel="nax__sh10" condDensity="0.04 S_per_cm2"    erev="50.0 mV" id="nax_dendritic" ion="na" />
                <channelDensity segmentGroup="dendrite_group" ionChannel="kdrmt"     condDensity="0.001 S_per_cm2"  erev="-90.0 mV" id="kdrmt_dendritic" ion="k" />
                <channelDensity segmentGroup="dendrite_group" ionChannel="kamt"      condDensity="0.004 S_per_cm2"  erev="-90.0 mV" id="kamt_dendritic" ion="k" />

                <channelDensity segmentGroup="axon_group" ionChannel="pas"      condDensity="0.001 S_per_cm2" erev="-65.0 mV" id="passive_axonal" ion="non_specific"/>
                <channelDensity segmentGroup="axon_group" ionChannel="nax__sh0" condDensity="0.8 S_per_cm2"    erev="50.0 mV" id="nax_axonal" ion="na" />
                <channelDensity segmentGroup="axon_group" ionChannel="kdrmt"    condDensity="0.001 S_per_cm2" erev="-90.0 mV" id="kdrmt_axonal" ion="k" />
                <channelDensity segmentGroup="axon_group" ionChannel="kamt"     condDensity="0.08 S_per_cm2"  erev="-90.0 mV" id="kamt_axonal" ion="k" />

                <channelDensity segmentGroup="soma_group" ionChannel="pas"      condDensity="0.0001 S_per_cm2" erev="-65.0 mV" id="passive_somatic" ion="non_specific"/>
                <channelDensity segmentGroup="soma_group" ionChannel="nax__sh0" condDensity="0.04 S_per_cm2"    erev="50.0 mV" id="nax_somatic" ion="na" />
                <channelDensity segmentGroup="soma_group" ionChannel="kdrmt"    condDensity="0.001 S_per_cm2"  erev="-90.0 mV" id="kdrmt_somatic" ion="k" />
                <channelDensity segmentGroup="soma_group" ionChannel="kamt"     condDensity="0.004 S_per_cm2"  erev="-90.0 mV" id="kamt_somatic" ion="k" />

                <spikeThresh value="0 mV"/>

                <specificCapacitance value="0.7 uF_per_cm2"/>

                <initMembPotential value="-65.0 mV"/>

            </membraneProperties>

            <intracellularProperties>
                <resistivity value="150 ohm_cm"/>
            </intracellularProperties>

        </biophysicalProperties>
    </cell>
</neuroml>
