<?xml version="1.0" encoding="UTF-8"?>
<neuroml xmlns="http://www.neuroml.org/schema/neuroml2" xmlns:xsi="http://www.w3.org/2001/XMLSchema-instance" xsi:schemaLocation="http://www.neuroml.org/schema/neuroml2  https://raw.githubusercontent.com/NeuroML/NeuroML2/development/Schemas/NeuroML2/NeuroML_v2beta4.xsd" id="network_Migliore2014">

    <include href="../Channels/pas.channel.nml"/>
    <include href="../Channels/nax.channel.nml"/>
    <include href="../Channels/nax__sh0.channel.nml"/>
    <include href="../Channels/nax__sh10.channel.nml"/>
    <include href="../Channels/nax__sh15.channel.nml"/>
    <include href="../Channels/kamt.channel.nml"/>
    <include href="../Channels/kdrmt.channel.nml"/>

    <include href="../Synapses/FI.synapse.xml"/>
    <include href="../Synapses/AmpaNmda.synapse.xml"/>

    <include href="Glomerulus.cell.nml"/>

    <!-- Exported Cells -->

    <include href="../MitralCells/Exported/Mitral_0_0.cell.nml"/>
    <include href="../GranuleCells/Exported/Granule_0_110821.cell.nml"/>

    <network id="network_Migliore2014" type="networkWithTemperature" temperature="35 degC">

        <population id="Pop_Gloms" component="Glomerulus" type="populationList" size="1">
            <instance id="0">
                <location x="207.282545379" y="221.710431868" z="866.200622035"/>
            </instance>

        </population>

        <population id="Pop_Mitral_0_0" component="Mitral_0_0" type="populationList" size="1">
            <instance id="0">
                <location x="0" y="0" z="0"/>
            </instance>
        </population>
        <population id="Pop_Granule_0_110821" component="Granule_0_110821" type="populationList" size="1">
            <instance id="0">
                <location x="375" y="1050" z="450"/>
            </instance>
        </population>

        <!--<projection id="Proj_703836162_G2M" presynapticPopulation="Pop_Granule_0_110821" postsynapticPopulation="Pop_Mitral_0_0" synapse="FIsyn">-->
            <!--<connection id="0" preCellId="../Pop_Granule_0_110821/0/Granule_0_110821" postCellId="../Pop_Mitral_0_0/0/Mitral_0_0" preSegmentId="4" preFractionAlong="0.5" postSegmentId="257" postFractionAlong="0.8613035678863525"/>-->
        <!--</projection>-->

        <inputList id="stimInput1" component="synTrain" population="Pop_Mitral_0_0">
            <input id="0" target="../Pop_Mitral_0_0/0/Mitral_0_0" segmentId="0" fractionAlong="0.5" destination="synapses"/>
        </inputList>

        <projection id="Proj_703836162_M2G" presynapticPopulation="Pop_Mitral_0_0" postsynapticPopulation="Pop_Granule_0_110821" synapse="AmpaNmdaSynapse">
            <connection id="0" preCellId="../Pop_Mitral_0_0/0/Mitral_0_0" postCellId="../Pop_Granule_0_110821/0/Granule_0_110821" preSegmentId="257" preFractionAlong="0.8613035678863525" postSegmentId="4" postFractionAlong="0.5"/>
        </projection>

    </network>

    <expTwoSynapse id="AMPA" tauRise="3e-5s" tauDecay="0.5e-3s" gbase=".3nS" erev="0V"/>

    <timedSynapticInput id="synTrain" synapse="AMPA" spikeTarget="./AMPA">
        <spike id="0" time="2 ms"/>
        <spike id="1" time="15 ms"/>
    </timedSynapticInput>

</neuroml>
