<?xml version="1.0" encoding="ISO-8859-1"?>
<neuroml xmlns="http://www.neuroml.org/schema/neuroml2" xmlns:xsi="http://www.w3.org/2001/XMLSchema-instance" xsi:schemaLocation="http://www.neuroml.org/schema/neuroml2 https://raw.github.com/NeuroML/NeuroML2/development/Schemas/NeuroML2/NeuroML_v2beta4.xsd" id="TEST_syn">

    <notes>This is placeholder synapse, to be deleted after the complete version is extracted from NEURON code</notes>

    <expTwoSynapse id="TEST_syn" tauRise="0.003s" tauDecay="0.0031s" gbase="30e-9S" erev="0.0V">

</expTwoSynapse>

</neuroml>
